α := 0.5
d := 3
a := 100
P_0 := 5
b := 2
t := 0, 0.1 .. 10
c := 10
x := 5
Given
d/dt(P(t)) == α*(a - b*P(t) - c - d*P(t))
P(0) == P_0
P := Odesolve(t, 10)
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P(0) = 5
P(5) = 18
P(10) = 18
d/dx(P(x)) = 0.00012382
integral(P(x), x = 0 .. x) = 84.8
