k := 5
x := 5
t := 0, 0.1 .. 10
Given
y_a(0) == 10
U_a(t) := 0
d/dt(y_a(t)) == k*U_a(t)
y_a := Odesolve(t, 10)
y_a(0) = 10
d/dx(y_a(x)) = 0
y_a(5) = 10
integral(y_a(t), t = 0 .. x) = 50
y_a(10) = 10
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Given
y_b(0) == 10
U_b(t) := 8
d/dt(y_b(t)) == k*U_b(t)
y_b := Odesolve(t, 10)
y_b(0) = 10
d/dx(y_b(x)) = 40
y_b(5) = 210
integral(y_b(t), t = 0 .. x) = 550
y_b(10) = 410
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Given
y_c(0) == 10
U_c(t) := 2 + 0.8*t
d/dt(y_c(t)) == k*U_c(t)
y_c := Odesolve(t, 10)
y_c(0) = 10
d/dx(y_c(x)) = 30
y_c(5) = 110
integral(y_c(t), t = 0 .. x) = 258.333
y_c(10) = 310
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