y_max := 20000000
x := 25
t := 0, 1 .. 50
a_a(t) := 0.2
Given
d/dt(y_a(t)) == a_a(t)*(1 - y_a(t)/y_max)*y_a(t)
y_a(0) == 1*10^6
y_a := Odesolve(t, 50)
y_a(0) = 1000000
d/dx(y_a(x)) = 402445
y_a(25) = 17730166
integral(y_a(x), x = 0 .. x) = 212473249
y_a(50) = 19982763
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a_b(t) := 0.01 - 0.07*t
Given
d/dt(y_b(t)) == a_b(t)*(1 - y_b(t)/y_max)*y_b(t)
y_b(0) == 1*10^6
y_b := Odesolve(t, 50)
y_b(0) = 1000000
d/dx(y_b(x)) = -0.000740959
y_b(25) = 0.000427077
integral(y_b(x), x = 0 .. x) = 4954691
y_b(50) = -4.00492e-9
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a_c(t) := 0.02 - 0.07*t + 0.007*t^2
Given
d/dt(y_c(t)) == a_c(t)*(1 - y_c(t)/y_max)*y_c(t)
y_c(0) == 1*10^6
y_c := Odesolve(t, 50)
y_c(0) = 1000000
d/dx(y_c(x)) = 282.876
y_c(25) = 19999893
integral(y_c(x), x = 0 .. x) = 146764104
y_c(50) = 20000000
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