k_0 := 0.5
y_max := 20000
t := 0, 0.1 .. 20
x := 15
Given
u_a(t) := 0
d/dt(y_a(t)) == k_0*y_a(t)*(1 - y_a(t)/y_max) + u_a(t)
y_a(0) == 1000
y_a := Odesolve(t, 20)
y_a(0) = 1000
d/dx(y_a(x)) = 102.912
y_a(10) = 17730.2
integral(y_a(x), x = 0 .. x) = 180589
y_a(20) = 19982.8
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Given
u_b(t) := 4000
d/dt(y_b(t)) == k_0*y_b(t)*(1 - y_b(t)/y_max) + u_b(t)
y_b(0) == 1000
y_b := Odesolve(t, 20)
y_b(0) = 1000
d/dx(y_b(x)) = 0.513108
y_b(10) = 26088.7
integral(y_b(x), x = 0 .. x) = 331471
y_b(20) = 26124.5
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Given
a := 0.5
b := 0.25
u_c(t) := a + b*t
d/dt(y_c(t)) == k_0*y_c(t)*(1 - y_c(t)/y_max) + u_c(t)
y_c(0) == 1000
y_c := Odesolve(t, 20)
y_c(0) = 1000
d/dx(y_c(x)) = 103.016
y_c(10) = 17741.3
integral(y_c(x), x = 0 .. x) = 180719
y_c(20) = 19992.9
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Given
γ := 0.2
u_d(t) := γ*t
y_d(0) == 1000
d/dt(y_d(t)) == k_0*y_d(t)*(1 - y_d(t)/y_max) + u_d(y_d(t))
y_d := Odesolve(t, 20)
y_d(0) = 1000
d/dx(y_d(x)) = 14.5506
y_d(10) = 27327.2
integral(y_d(x), x = 0 .. x) = 286742
y_d(20) = 27999.4
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Given
c := 0.02
γ(t) := c*t
u_e(t) := t
d/dt(y_e(t)) == k_0*y_e(t)*(1 - y_e(t)/y_max) + u_e(y_e(t)*γ(t))
y_e(0) == 1000
y_e := Odesolve(t, 20)
y_e(0) = 1000
d/dx(y_e(x)) = 870.755
y_e(10) = 25159.8
integral(y_e(x), x = 0 .. x) = 252806
y_e(20) = 35059.5
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