Given
y_1''(t) - 1*(1 - y_1(t)^2)*y_1'(t) + y_1(t) == 0
y_1(0) == 0.01
y_1'(0) == 0
y_1 := Odesolve(t, 30)
Given
y_2''(t) - 2*(1 - y_2(t)^2)*y_2'(t) + y_2(t) == 0
y_2(0) == 0.01
y_2'(0) == 0
y_2 := Odesolve(t, 30)
Given
y_3''(t) - 3*(1 - y_3(t)^2)*y_3'(t) + y_3(t) == 0
y_3(0) == 0.01
y_3'(0) == 0
y_3 := Odesolve(t, 30)
t := 0, 0.1 .. 30
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