α := 0.079
β := 0.039
γ := 0.099
E0 := 290
W_star := (β*E0)/(β - α)
S_star := (α*E0)/(β - α)
W_star = -282.75
S_star = -572.75
λ_1 := ((α - γ) + sqrt((α - γ)^2 - 4*γ*(β - α)))/2
λ_2 := ((α - γ) - sqrt((α - γ)^2 - 4*γ*(β - α)))/2
λ_1 = 0.0537181
λ_2 = -0.0737181
# Оскільки λ1​>0, а λ2​<0, точка спокою типу Сідло. Система є нестійкою.
D(t, y) := [α*y[0] - β*y[1]; γ*(y[0] - y[1] - E0)]
ic := [600; 520]
t0 := 0
t1 := 100
N := 1000
Z := rkfixed(ic, t0, t1, N, D)
W_plot := Z[:, 1]
S_plot := Z[:, 2]
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